@Author Known Unknown;
@Date 17 / 01 / 2023;
@Description{ };

@ModellingHypothesis 'Tridimensional';
@Behaviour<generic>  'src/libBehaviour.so' 'MericCailletaudSingleCrystalViscoPlasticity';

@OutputFile 'Test.txt';


// Other
@ExternalStateVariable 'Temperature' 330.;


// full strain control

@ImposedStrain 'EZZ' {0.: 0., 10. : 0.02};
@ImposedStrain 'EYY' 0.;
@ImposedStrain 'EXX' 0.;
@ImposedStrain 'EXY' 0.;
@ImposedStrain 'EXZ' 0.;
@ImposedStrain 'EYZ' 0.;

@Times {0.,10. in 200};
